# OpenSim document version 40600
ModelWarperV3Document:
  ThinPlateSplineMeshesScalingStep [values shared by the 7 below unless stated]: apply_affine_translation=true
      apply_affine_rotation=true
  ThinPlateSplineMeshesScalingStep thinplatesplinemeshesscalingstep_0: label=(Apply TPS to Pelvis_r Mesh)
      source_landmarks_file=..\template_warping_files\pelvis_r_mesh_template_landmarks.csv
      destination_landmarks_file=..\..\participant_data\ParticipantID\warping_files\pelvis_r_mesh_target_landmarks.csv
      landmarks_frame=/bodyset/pelvis/pelvis_physicalbodyoffset apply_affine_scale=true apply_non_affine_warp=true
      meshes=/bodyset/pelvis/pelvis_physicalbodyoffset/pelvis_r_geom
  ThinPlateSplineMeshesScalingStep thinplatesplinemeshesscalingstep_1: label=(Apply TPS to Pelvis_l Mesh)
      source_landmarks_file=..\template_warping_files\pelvis_l_mesh_template_landmarks.csv
      destination_landmarks_file=..\..\participant_data\ParticipantID\warping_files\pelvis_l_mesh_target_landmarks.csv
      landmarks_frame=/bodyset/pelvis/pelvis_physicalbodyoffset apply_affine_scale=true apply_non_affine_warp=true
      meshes=/bodyset/pelvis/pelvis_physicalbodyoffset/pelvis_l_geom
  ThinPlateSplineMeshesScalingStep thinplatesplinemeshesscalingstep_2: label=(Apply TPS to Sacrum Mesh)
      source_landmarks_file=..\template_warping_files\sacrum_mesh_template_landmarks.csv
      destination_landmarks_file=..\..\participant_data\ParticipantID\warping_files\sacrum_mesh_target_landmarks.csv
      landmarks_frame=/bodyset/pelvis/pelvis_physicalbodyoffset
      meshes=/bodyset/pelvis/pelvis_physicalbodyoffset/sacrum_geom
  ThinPlateSplineStationsScalingStep [values shared by the 5 below unless stated]: apply_affine_translation=true
      apply_affine_rotation=true
  ThinPlateSplineStationsScalingStep thinplatesplinestationsscalingstep_0: label=(Apply TPS to Pelvis Stations)
      source_landmarks_file=..\template_warping_files\pelvis_stations_template_landmarks.csv
      destination_landmarks_file=..\..\participant_data\ParticipantID\warping_files\pelvis_stations_target_landmarks.csv
      landmarks_frame=/bodyset/pelvis/pelvis_physicalbodyoffset apply_affine_scale=true apply_non_affine_warp=true
      stations=(/bodyset/pelvis/rASIS_in_pelvis_physicalbodyoffset /bodyset/pelvis/midASIS_in_pelvis_physicalbodyoffset /bodyset/pelvis/midPSIS_in_pelvis_physicalbodyoffset /bodyset/pelvis/hip_r_joint_in_pelvis /bodyset/pelvis/hip_l_joint_in_pelvis /bodyset/pelvis/lASIS_in_pelvis_physicalbodyoffset /bodyset/pelvis/rPSIS_in_pelvis_physicalbodyoffset /bodyset/pelvis/lPSIS_in_pelvis_physicalbodyoffset)
  ThinPlateSplineMeshesScalingStep thinplatesplinemeshesscalingstep_3: label=(Apply TPS to Femur_r Mesh)
      source_landmarks_file=..\template_warping_files\femur_r_mesh_template_landmarks.csv
      destination_landmarks_file=..\..\participant_data\ParticipantID\warping_files\femur_r_mesh_target_landmarks.csv
      landmarks_frame=/bodyset/femur_r/femur_r_physicalbodyoffset
      meshes=/bodyset/femur_r/femur_r_physicalbodyoffset/femur_r_geom
  ThinPlateSplineStationsScalingStep thinplatesplinestationsscalingstep_3: label=(Apply TPS to Femur_r Stations)
      source_landmarks_file=..\template_warping_files\femur_r_stations_template_landmarks.csv
      destination_landmarks_file=..\..\participant_data\ParticipantID\warping_files\femur_r_stations_target_landmarks.csv
      landmarks_frame=/bodyset/femur_r/femur_r_physicalbodyoffset
      stations=(/bodyset/femur_r/mid_rFE_in_femur_r_physicalbodyoffset /bodyset/femur_r/hip_r_joint_in_r_femur /bodyset/femur_r/rFLE_in_femur_r_physicalbodyoffset /bodyset/femur_r/rFME_in_femur_r_physicalbodyoffset)
  ThinPlateSplineMeshesScalingStep thinplatesplinemeshesscalingstep_4: label=(Apply TPS to Femur_l Mesh)
      source_landmarks_file=..\template_warping_files\femur_l_mesh_template_landmarks.csv
      destination_landmarks_file=..\..\participant_data\ParticipantID\warping_files\femur_l_mesh_target_landmarks.csv
      landmarks_frame=/bodyset/femur_l/femur_l_physicalbodyoffset
      meshes=/bodyset/femur_l/femur_l_physicalbodyoffset/femur_l_geom
  ThinPlateSplineStationsScalingStep thinplatesplinestationsscalingstep_4: label=(Apply TPS to Femur_l Stations)
      source_landmarks_file=..\template_warping_files\femur_l_stations_template_landmarks.csv
      destination_landmarks_file=..\..\participant_data\ParticipantID\warping_files\femur_l_stations_target_landmarks.csv
      landmarks_frame=/bodyset/femur_l/femur_l_physicalbodyoffset
      stations=(/bodyset/femur_l/mid_lFE_in_femur_l_physicalbodyoffset /bodyset/femur_l/hip_l_joint_in_l_femur /bodyset/femur_l/lFLE_in_femur_l_physicalbodyoffset /bodyset/femur_l/lFME_in_femur_l_physicalbodyoffset)
  ThinPlateSplineMeshesScalingStep thinplatesplinemeshesscalingstep_5: label=(Apply TPS to Patella_r Mesh)
      source_landmarks_file=..\template_warping_files\patella_r_mesh_template_landmarks.csv
      destination_landmarks_file=..\..\participant_data\ParticipantID\warping_files\patella_r_mesh_target_landmarks.csv
      landmarks_frame=/bodyset/patella_r/patella_r_physicalbodyoffset
      meshes=/bodyset/patella_r/patella_r_physicalbodyoffset/patella_r_geom
  ThinPlateSplineStationsScalingStep thinplatesplinestationsscalingstep_7: label=(Apply TPS to Patella_r Stations)
      source_landmarks_file=..\template_warping_files\femur_r_stations_template_landmarks.csv
      destination_landmarks_file=..\..\participant_data\ParticipantID\warping_files\femur_r_stations_target_landmarks.csv
      landmarks_frame=/bodyset/patella_r/patella_r_physicalbodyoffset
      stations=(/bodyset/patella_r/rFLE_in_patella_r_physicalbodyoffset /bodyset/patella_r/mid_rFE_in_patella_r_physicalbodyoffset /bodyset/patella_r/hip_r_joint_in_r_patella)
  ThinPlateSplineMeshesScalingStep thinplatesplinemeshesscalingstep_6: label=(Apply TPS to Patella_l Mesh)
      source_landmarks_file=..\template_warping_files\patella_l_mesh_template_landmarks.csv
      destination_landmarks_file=..\..\participant_data\ParticipantID\warping_files\patella_l_mesh_target_landmarks.csv
      landmarks_frame=/bodyset/patella_l/patella_l_physicalbodyoffset
      meshes=/bodyset/patella_l/patella_l_physicalbodyoffset/patella_l_geom
  ThinPlateSplineStationsScalingStep thinplatesplinestationsscalingstep_8: label=(Apply TPS to Patella_l Stations)
      source_landmarks_file=..\template_warping_files\femur_l_stations_template_landmarks.csv
      destination_landmarks_file=..\..\participant_data\ParticipantID\warping_files\femur_l_stations_target_landmarks.csv
      landmarks_frame=/bodyset/patella_l/patella_l_physicalbodyoffset
      stations=(/bodyset/patella_l/lFME_in_patella_l_physicalbodyoffset /bodyset/patella_l/mid_lFE_in_patella_l_physicalbodyoffset /bodyset/patella_l/hip_l_joint_in_l_patella)
  ThinPlateSplinePathPointsScalingStep [values shared by the 7 below unless stated]: apply_affine_translation=true
      apply_affine_rotation=true
  ThinPlateSplinePathPointsScalingStep thinplatesplinepathpointsscalingstep_0: label=(Apply TPS to Pelvis_r Path Points)
      source_landmarks_file=..\template_warping_files\pelvis_r_mesh_template_landmarks.csv
      destination_landmarks_file=..\..\participant_data\ParticipantID\warping_files\pelvis_r_mesh_target_landmarks.csv
      landmarks_frame=/bodyset/pelvis/pelvis_physicalbodyoffset
      path_points=(/forceset/glmed1_r/path/glmed1_r-P1 /forceset/glmed2_r/path/glmed2_r-P1 /forceset/glmed3_r/path/glmed3_r-P1 /forceset/glmax1_r/path/glmax1_r-P1 /forceset/glmax2_r/path/glmax2_r-P1 /forceset/addmagDist_r/path/addmagDist_r-P1 /forceset/addmagIsch_r/path/addmagIsch_r-P1 /forceset/addmagMid_r/path/addmagMid_r-P1 /forceset/addmagProx_r/path/addmagProx_r-P1 /forceset/recfem_r/path/recfem_r-P1 /forceset/glmax1_r/path/glmax1_r-P2 /forceset/glmax2_r/path/glmax2_r-P2 /forceset/glmax3_r/path/glmax3_r-P2)
  ThinPlateSplinePathPointsScalingStep thinplatesplinepathpointsscalingstep_1: label=(Apply TPS to Pelvis_l Path Points)
      source_landmarks_file=..\template_warping_files\pelvis_l_mesh_template_landmarks.csv
      destination_landmarks_file=..\..\participant_data\ParticipantID\warping_files\pelvis_l_mesh_target_landmarks.csv
      landmarks_frame=/bodyset/pelvis/pelvis_physicalbodyoffset
      path_points=(/forceset/glmed1_l/path/glmed1_l-P1 /forceset/glmed2_l/path/glmed2_l-P1 /forceset/glmed3_l/path/glmed3_l-P1 /forceset/glmax1_l/path/glmax1_l-P1 /forceset/glmax2_l/path/glmax2_l-P1 /forceset/addmagDist_l/path/addmagDist_l-P1 /forceset/addmagIsch_l/path/addmagIsch_l-P1 /forceset/addmagMid_l/path/addmagMid_l-P1 /forceset/addmagProx_l/path/addmagProx_l-P1 /forceset/recfem_l/path/recfem_l-P1 /forceset/glmax1_l/path/glmax1_l-P2 /forceset/glmax2_l/path/glmax2_l-P2 /forceset/glmax3_l/path/glmax3_l-P2)
  ThinPlateSplinePathPointsScalingStep thinplatesplinepathpointsscalingstep_2: label=(Apply TPS to Sacrum Path Points)
      source_landmarks_file=..\template_warping_files\sacrum_mesh_template_landmarks.csv
      destination_landmarks_file=..\..\participant_data\ParticipantID\warping_files\sacrum_mesh_target_landmarks.csv
      landmarks_frame=/bodyset/pelvis/pelvis_physicalbodyoffset
      path_points=(/forceset/glmax3_l/path/glmax3_l-P1 /forceset/glmax3_r/path/glmax3_r-P1)
  ThinPlateSplinePathPointsScalingStep thinplatesplinepathpointsscalingstep_3: label=(Apply TPS to Femur_r Path Points)
      source_landmarks_file=..\template_warping_files\femur_r_mesh_template_landmarks.csv
      destination_landmarks_file=..\..\participant_data\ParticipantID\warping_files\femur_r_mesh_target_landmarks.csv
      landmarks_frame=/bodyset/femur_r/femur_r_physicalbodyoffset
      path_points=(/forceset/glmed1_r/path/glmed1_r-P2 /forceset/glmed2_r/path/glmed2_r-P2 /forceset/glmed3_r/path/glmed3_r-P2 /forceset/glmax1_r/path/glmax1_r-P3 /forceset/glmax1_r/path/glmax1_r-P4 /forceset/glmax2_r/path/glmax2_r-P3 /forceset/glmax2_r/path/glmax2_r-P4 /forceset/glmax3_r/path/glmax3_r-P3 /forceset/glmax3_r/path/glmax3_r-P4 /forceset/addmagDist_r/path/addmagDist_r-P2 /forceset/addmagIsch_r/path/addmagIsch_r-P2 /forceset/addmagMid_r/path/addmagMid_r-P2 /forceset/addmagProx_r/path/addmagProx_r-P2)
  ThinPlateSplinePathPointsScalingStep thinplatesplinepathpointsscalingstep_4: label=(Apply TPS to Femur_l Path Points)
      source_landmarks_file=..\template_warping_files\femur_l_mesh_template_landmarks.csv
      destination_landmarks_file=..\..\participant_data\ParticipantID\warping_files\femur_l_mesh_target_landmarks.csv
      landmarks_frame=/bodyset/femur_l/femur_l_physicalbodyoffset
      path_points=(/forceset/glmed1_l/path/glmed1_l-P2 /forceset/glmed2_l/path/glmed2_l-P2 /forceset/glmed3_l/path/glmed3_l-P2 /forceset/glmax1_l/path/glmax1_l-P3 /forceset/glmax1_l/path/glmax1_l-P4 /forceset/glmax2_l/path/glmax2_l-P3 /forceset/glmax2_l/path/glmax2_l-P4 /forceset/glmax3_l/path/glmax3_l-P3 /forceset/glmax3_l/path/glmax3_l-P4 /forceset/addmagDist_l/path/addmagDist_l-P2 /forceset/addmagIsch_l/path/addmagIsch_l-P2 /forceset/addmagMid_l/path/addmagMid_l-P2 /forceset/addmagProx_l/path/addmagProx_l-P2)
  ThinPlateSplinePathPointsScalingStep thinplatesplinepathpointsscalingstep_5: label=(Apply TPS to Patella_r Path Points)
      source_landmarks_file=..\template_warping_files\patella_r_mesh_template_landmarks.csv
      destination_landmarks_file=..\..\participant_data\ParticipantID\warping_files\patella_r_mesh_target_landmarks.csv
      landmarks_frame=/bodyset/patella_r/patella_r_physicalbodyoffset path_points=/forceset/recfem_r/path/recfem_r-P2
  ThinPlateSplinePathPointsScalingStep thinplatesplinepathpointsscalingstep_6: label=(Apply TPS to Patella_l Path Points)
      source_landmarks_file=..\template_warping_files\patella_l_mesh_template_landmarks.csv
      destination_landmarks_file=..\..\participant_data\ParticipantID\warping_files\patella_l_mesh_target_landmarks.csv
      landmarks_frame=/bodyset/patella_l/patella_l_physicalbodyoffset path_points=/forceset/recfem_l/path/recfem_l-P2
  ThinPlateSplineWrapCylinderScalingStep [values shared by the 6 below unless stated]: apply_affine_translation=true
      apply_affine_rotation=true
  ThinPlateSplineWrapCylinderScalingStep thinplatesplinewrapcylinderscalingstep_0: label=(Apply TPS to WrapCylinders in Pelvis_l)
      source_landmarks_file=..\template_warping_files\pelvis_l_mesh_template_landmarks.csv
      destination_landmarks_file=..\..\participant_data\ParticipantID\warping_files\pelvis_l_mesh_target_landmarks.csv
      landmarks_frame=/bodyset/pelvis/pelvis_physicalbodyoffset
      wrap_cylinders=(/bodyset/pelvis/pelvis_physicalbodyoffset/wrapobjectset/glmax1_at_pelvis_l /bodyset/pelvis/pelvis_physicalbodyoffset/wrapobjectset/glmax2_at_pelvis_l /bodyset/pelvis/pelvis_physicalbodyoffset/wrapobjectset/glmax3_at_pelvis_l)
      midline_projection_distance=0.02 [meters] surface_projection_theta=0 [radians]
  ThinPlateSplineWrapCylinderScalingStep thinplatesplinewrapcylinderscalingstep_1: label=(Apply TPS to WrapCylinders in Pelvis_r)
      source_landmarks_file=..\template_warping_files\pelvis_r_mesh_template_landmarks.csv
      destination_landmarks_file=..\..\participant_data\ParticipantID\warping_files\pelvis_r_mesh_target_landmarks.csv
      landmarks_frame=/bodyset/pelvis/pelvis_physicalbodyoffset
      wrap_cylinders=(/bodyset/pelvis/pelvis_physicalbodyoffset/wrapobjectset/glmax1_at_pelvis_r /bodyset/pelvis/pelvis_physicalbodyoffset/wrapobjectset/glmax2_at_pelvis_r /bodyset/pelvis/pelvis_physicalbodyoffset/wrapobjectset/glmax3_at_pelvis_r)
      midline_projection_distance=-0.02 surface_projection_theta=0
  ThinPlateSplineWrapCylinderScalingStep thinplatesplinewrapcylinderscalingstep_2: label=(Apply TPS to WrapCylinders in Femur_l)
      source_landmarks_file=..\template_warping_files\femur_l_mesh_template_landmarks.csv
      destination_landmarks_file=..\..\participant_data\ParticipantID\warping_files\femur_l_mesh_target_landmarks.csv
      landmarks_frame=/bodyset/femur_l/femur_l_physicalbodyoffset
      wrap_cylinders=(/bodyset/femur_l/femur_l_physicalbodyoffset/wrapobjectset/addmagProx_at_femur_l /bodyset/femur_l/femur_l_physicalbodyoffset/wrapobjectset/addmagMid_at_femur_l /bodyset/femur_l/femur_l_physicalbodyoffset/wrapobjectset/addmagDist_at_femur_l)
      midline_projection_distance=0.02 surface_projection_theta=3.14159
  ThinPlateSplineWrapCylinderScalingStep thinplatesplinewrapcylinderscalingstep_3: label=(Apply TPS to WrapCylinders in Femur_l)
      source_landmarks_file=..\template_warping_files\femur_l_mesh_template_landmarks.csv
      destination_landmarks_file=..\..\participant_data\ParticipantID\warping_files\femur_l_mesh_target_landmarks.csv
      landmarks_frame=/bodyset/femur_l/femur_l_physicalbodyoffset
      wrap_cylinders=/bodyset/femur_l/femur_l_physicalbodyoffset/wrapobjectset/addmagIsch_at_femur_l
      midline_projection_distance=0.02 surface_projection_theta=1.570796
  ThinPlateSplineWrapCylinderScalingStep thinplatesplinewrapcylinderscalingstep_4: label=(Apply TPS to WrapCylinders in Femur_r)
      source_landmarks_file=..\template_warping_files\femur_r_mesh_template_landmarks.csv
      destination_landmarks_file=..\..\participant_data\ParticipantID\warping_files\femur_r_mesh_target_landmarks.csv
      landmarks_frame=/bodyset/femur_r/femur_r_physicalbodyoffset
      wrap_cylinders=(/bodyset/femur_r/femur_r_physicalbodyoffset/wrapobjectset/addmagProx_at_femur_r /bodyset/femur_r/femur_r_physicalbodyoffset/wrapobjectset/addmagMid_at_femur_r /bodyset/femur_r/femur_r_physicalbodyoffset/wrapobjectset/addmagDist_at_femur_r)
      midline_projection_distance=-0.02 surface_projection_theta=3.14159
  ThinPlateSplineWrapCylinderScalingStep thinplatesplinewrapcylinderscalingstep_5: label=(Apply TPS to WrapCylinders in Femur_r)
      source_landmarks_file=..\template_warping_files\femur_r_mesh_template_landmarks.csv
      destination_landmarks_file=..\..\participant_data\ParticipantID\warping_files\femur_r_mesh_target_landmarks.csv
      landmarks_frame=/bodyset/femur_r/femur_r_physicalbodyoffset
      wrap_cylinders=/bodyset/femur_r/femur_r_physicalbodyoffset/wrapobjectset/addmagIsch_at_femur_r
      midline_projection_distance=-0.02 surface_projection_theta=1.570796
  scaling_parameter_overrides: ScalingParameterOverride: parameter_name=blending_factor parameter_value=1
