# OpenSim document version 40600
Model StationDefinedTemplateModel_HipJoints_RajagopalLaiUlrich2023:
  gravity: 0 -9.80665 0
  length_units: meters
  force_units: N
  Ground
  BodySet:
    Body pelvis: mass=1 mass_center=(0 0 0) inertia=(1 1 1 0 0 0)
      PhysicalOffsetFrame pelvis_physicalbodyoffset: socket_parent=.. translation=(0 0 0) [meters]
          meshes=(template_geometry/pelvis_l.stl template_geometry/pelvis_r.stl template_geometry/sacrum.stl)
        WrapCylinder glmax1_at_pelvis_l: xyz_body_rotation=(0.5990463 -0.4512688 0)
            translation=(-0.07720934 0.8411632 -0.061) quadrant=all radius=0.04 length=0.15
        WrapCylinder glmax2_at_pelvis_l: xyz_body_rotation=(0.749173 -0.3915864 0)
            translation=(-0.08017548 0.8571695 -0.068) quadrant=all radius=0.04 length=0.1
        WrapCylinder glmax3_at_pelvis_l: xyz_body_rotation=(0.09999978 -0.0002116332 0)
            translation=(-0.08318605 0.8521759 -0.068) quadrant=all radius=0.04 length=0.1
        WrapCylinder glmax1_at_pelvis_r: xyz_body_rotation=(-0.5990463 0.4512688 0)
            translation=(-0.07720934 0.8411632 0.061) quadrant=all radius=0.04 length=0.15
        WrapCylinder glmax2_at_pelvis_r: xyz_body_rotation=(-0.749173 0.3915864 0)
            translation=(-0.08017548 0.8571695 0.068) quadrant=all radius=0.04 length=0.1
        WrapCylinder glmax3_at_pelvis_r: xyz_body_rotation=(-0.09999978 0.0002116332 0)
            translation=(-0.08318605 0.8521759 0.068) quadrant=all radius=0.04 length=0.1
      Station rASIS_in_pelvis_physicalbodyoffset: pelvis_physicalbodyoffset (0 0.94 0.120833)
      Station midASIS_in_pelvis_physicalbodyoffset: pelvis_physicalbodyoffset (0 0.94 0)
      Station midPSIS_in_pelvis_physicalbodyoffset: pelvis_physicalbodyoffset (-0.137926 0.956807 0)
      Station hip_r_joint_in_pelvis: pelvis_physicalbodyoffset (-0.05624 0.861526 0.077217)
      Station hip_l_joint_in_pelvis: pelvis_physicalbodyoffset (-0.05624 0.861526 -0.077217)
      StationDefinedFrame pelvis_stationbodyoffset: socket_point_a=/bodyset/pelvis/midASIS_in_pelvis_physicalbodyoffset
          socket_point_b=/bodyset/pelvis/rASIS_in_pelvis_physicalbodyoffset
          socket_point_c=/bodyset/pelvis/midPSIS_in_pelvis_physicalbodyoffset
          socket_origin_point=/bodyset/pelvis/midASIS_in_pelvis_physicalbodyoffset ab_axis=z ab_x_ac_axis=-y
      StationDefinedFrame hip_r_parent_stationbodyoffset: socket_point_a=/bodyset/pelvis/midASIS_in_pelvis_physicalbodyoffset
          socket_point_b=/bodyset/pelvis/rASIS_in_pelvis_physicalbodyoffset
          socket_point_c=/bodyset/pelvis/midPSIS_in_pelvis_physicalbodyoffset
          socket_origin_point=/bodyset/pelvis/hip_r_joint_in_pelvis ab_axis=z ab_x_ac_axis=-y
      StationDefinedFrame hip_l_parent_stationbodyoffset: socket_point_a=/bodyset/pelvis/midASIS_in_pelvis_physicalbodyoffset
          socket_point_b=/bodyset/pelvis/rASIS_in_pelvis_physicalbodyoffset
          socket_point_c=/bodyset/pelvis/midPSIS_in_pelvis_physicalbodyoffset
          socket_origin_point=/bodyset/pelvis/hip_l_joint_in_pelvis ab_axis=z ab_x_ac_axis=-y
      Station lASIS_in_pelvis_physicalbodyoffset: pelvis_physicalbodyoffset (0 0.94 -0.120833)
      Station rPSIS_in_pelvis_physicalbodyoffset: pelvis_physicalbodyoffset (-0.137926 0.956807 0.040577)
      Station lPSIS_in_pelvis_physicalbodyoffset: pelvis_physicalbodyoffset (-0.137926 0.956807 -0.040577)
      # The mass of the body (kg)
      # NOTE: Body mass is a placeholder value and is not physically realistic. Future work should update this parameter appropriately.
      # NOTE: Mass center is a placeholder value and is not physically realistic. Future work should update this parameter appropriately.
      # NOTE: Inertia is a placeholder value and is not physically realistic. Future work should update this parameter appropriately.
    Body femur_r: mass=1 mass_center=(0 0 0) inertia=(1 1 1 0 0 0)
      PhysicalOffsetFrame femur_r_physicalbodyoffset: socket_parent=.. translation=(0 0 0)
          meshes=template_geometry/femur_r.stl
        WrapCylinder addmagProx_at_femur_r: xyz_body_rotation=(1.611235 0.1867471 0.003353163)
            translation=(-0.05146224 0.7876313 0.1030924) quadrant=all radius=0.0211 length=0.07
        WrapCylinder addmagMid_at_femur_r: xyz_body_rotation=(1.611371 0.1367471 0.003350472)
            translation=(-0.03361256 0.6998174 0.09830537) quadrant=all radius=0.0214 length=0.12
        WrapCylinder addmagDist_at_femur_r: xyz_body_rotation=(1.711855 0.1868348 0.003561876)
            translation=(-0.02498368 0.5997941 0.0870977) quadrant=all radius=0.0218 length=0.2
        WrapCylinder addmagIsch_at_femur_r: xyz_body_rotation=(1.7112 -0.4631643 0.003521868)
            translation=(-0.0792017 0.4836936 0.07445934) quadrant=all radius=0.04 length=0.24
      Station rFLE_in_femur_r_physicalbodyoffset: femur_r_physicalbodyoffset (-0.058419 0.455208 0.114293)
      Station mid_rFE_in_femur_r_physicalbodyoffset: femur_r_physicalbodyoffset (-0.053933 0.457088 0.076628)
      Station hip_r_joint_in_r_femur: femur_r_physicalbodyoffset (-0.05624 0.861526 0.077217)
      StationDefinedFrame femur_r_stationbodyoffset: socket_point_a=/bodyset/femur_r/mid_rFE_in_femur_r_physicalbodyoffset
          socket_point_b=/bodyset/femur_r/hip_r_joint_in_r_femur
          socket_point_c=/bodyset/femur_r/rFLE_in_femur_r_physicalbodyoffset
          socket_origin_point=/bodyset/femur_r/hip_r_joint_in_r_femur ab_axis=y ab_x_ac_axis=x
      Station rFME_in_femur_r_physicalbodyoffset: femur_r_physicalbodyoffset (-0.049446 0.458969 0.038962)
      # The mass of the body (kg)
      # NOTE: Body mass is a placeholder value and is not physically realistic. Future work should update this parameter appropriately.
      # NOTE: Mass center is a placeholder value and is not physically realistic. Future work should update this parameter appropriately.
      # NOTE: Inertia is a placeholder value and is not physically realistic. Future work should update this parameter appropriately.
    Body patella_r: mass=1 mass_center=(0 0 0) inertia=(1 1 1 0 0 0)
      PhysicalOffsetFrame patella_r_physicalbodyoffset: socket_parent=.. translation=(0 0 0)
          meshes=template_geometry/patella_r.stl
      Station rFLE_in_patella_r_physicalbodyoffset: patella_r_physicalbodyoffset (-0.058419 0.455208 0.114293)
      Station mid_rFE_in_patella_r_physicalbodyoffset: patella_r_physicalbodyoffset (-0.053933 0.457088 0.076628)
      Station hip_r_joint_in_r_patella: patella_r_physicalbodyoffset (-0.05624 0.861526 0.077217)
      StationDefinedFrame patella_r_stationbodyoffset: socket_point_a=/bodyset/patella_r/mid_rFE_in_patella_r_physicalbodyoffset
          socket_point_b=/bodyset/patella_r/hip_r_joint_in_r_patella
          socket_point_c=/bodyset/patella_r/rFLE_in_patella_r_physicalbodyoffset
          socket_origin_point=/bodyset/patella_r/hip_r_joint_in_r_patella ab_axis=y ab_x_ac_axis=x
      # The mass of the body (kg)
      # NOTE: Body mass is a placeholder value and is not physically realistic. Future work should update this parameter appropriately.
      # NOTE: Mass center is a placeholder value and is not physically realistic. Future work should update this parameter appropriately.
      # NOTE: Inertia is a placeholder value and is not physically realistic. Future work should update this parameter appropriately.
    Body femur_l: mass=1 mass_center=(0 0 0) inertia=(1 1 1 0 0 0)
      PhysicalOffsetFrame femur_l_physicalbodyoffset: socket_parent=.. translation=(0 0 0)
          meshes=template_geometry/femur_l.stl
        WrapCylinder addmagProx_at_femur_l: xyz_body_rotation=(-1.611235 -0.1867471 0.003353163)
            translation=(-0.05146224 0.7876313 -0.1030924) quadrant=all radius=0.0211 length=0.07
        WrapCylinder addmagMid_at_femur_l: xyz_body_rotation=(-1.611371 -0.1367471 0.003350472)
            translation=(-0.03361256 0.6998174 -0.09830537) quadrant=all radius=0.0214 length=0.12
        WrapCylinder addmagDist_at_femur_l: xyz_body_rotation=(-1.711855 -0.1868348 0.003561876)
            translation=(-0.02498368 0.5997941 -0.0870977) quadrant=all radius=0.0218 length=0.2
        WrapCylinder addmagIsch_at_femur_l: xyz_body_rotation=(-1.7112 0.4631643 0.003521868)
            translation=(-0.0792017 0.4836936 -0.07445934) quadrant=all radius=0.04 length=0.24
      Station lFME_in_femur_l_physicalbodyoffset: femur_l_physicalbodyoffset (-0.049446 0.458969 -0.038962)
      Station mid_lFE_in_femur_l_physicalbodyoffset: femur_l_physicalbodyoffset (-0.053933 0.457088 -0.076628)
      Station hip_l_joint_in_l_femur: femur_l_physicalbodyoffset (-0.05624 0.861526 -0.077217)
      StationDefinedFrame femur_l_stationbodyoffset: socket_point_a=/bodyset/femur_l/mid_lFE_in_femur_l_physicalbodyoffset
          socket_point_b=/bodyset/femur_l/hip_l_joint_in_l_femur
          socket_point_c=/bodyset/femur_l/lFME_in_femur_l_physicalbodyoffset
          socket_origin_point=/bodyset/femur_l/hip_l_joint_in_l_femur ab_axis=y ab_x_ac_axis=x
      Station lFLE_in_femur_l_physicalbodyoffset: femur_l_physicalbodyoffset (-0.058419 0.455208 -0.114293)
      # The mass of the body (kg)
      # NOTE: Body mass is a placeholder value and is not physically realistic. Future work should update this parameter appropriately.
      # NOTE: Mass center is a placeholder value and is not physically realistic. Future work should update this parameter appropriately.
      # NOTE: Inertia is a placeholder value and is not physically realistic. Future work should update this parameter appropriately.
    Body patella_l: mass=1 mass_center=(0 0 0) inertia=(1 1 1 0 0 0)
      PhysicalOffsetFrame patella_l_physicalbodyoffset: socket_parent=.. translation=(0 0 0)
          meshes=template_geometry/patella_l.stl
      Station lFME_in_patella_l_physicalbodyoffset: patella_l_physicalbodyoffset (-0.049446 0.458969 -0.038962)
      Station mid_lFE_in_patella_l_physicalbodyoffset: patella_l_physicalbodyoffset (-0.053933 0.457088 -0.076628)
      Station hip_l_joint_in_l_patella: patella_l_physicalbodyoffset (-0.05624 0.861526 -0.077217)
      StationDefinedFrame patella_l_stationbodyoffset: socket_point_a=/bodyset/patella_l/mid_lFE_in_patella_l_physicalbodyoffset
          socket_point_b=/bodyset/patella_l/hip_l_joint_in_l_patella
          socket_point_c=/bodyset/patella_l/lFME_in_patella_l_physicalbodyoffset
          socket_origin_point=/bodyset/patella_l/hip_l_joint_in_l_patella ab_axis=y ab_x_ac_axis=x
      # The mass of the body (kg)
      # NOTE: Body mass is a placeholder value and is not physically realistic. Future work should update this parameter appropriately.
      # NOTE: Mass center is a placeholder value and is not physically realistic. Future work should update this parameter appropriately.
      # NOTE: Inertia is a placeholder value and is not physically realistic. Future work should update this parameter appropriately.
  JointSet:
    CustomJoint ground_pelvis: socket_parent_frame=ground_offset socket_child_frame=pelvis_offset
      Coordinate pelvis_tilt: default_value=0 range=(-1.570796 1.570796) clamped=false
      Coordinate pelvis_list: default_value=0 range=(-1.570796 1.570796) clamped=false
      Coordinate pelvis_rotation: default_value=0 range=(-6.283185 6.283185) clamped=false
      Coordinate pelvis_tx: default_value=0 range=(-50 50) clamped=false
      Coordinate pelvis_ty: default_value=0 range=(-1 2) clamped=false
      Coordinate pelvis_tz: default_value=0 range=(-3 3) clamped=false
      PhysicalOffsetFrame ground_offset: socket_parent=/ground translation=(0 0 0)
      PhysicalOffsetFrame pelvis_offset: socket_parent=/bodyset/pelvis/pelvis_stationbodyoffset translation=(0 0 0)
      SpatialTransform:
        TransformAxis rotation1: coordinates=pelvis_tilt axis=(0 0 1) LinearFunction(coefficients=1 0)
        TransformAxis rotation2: coordinates=pelvis_list axis=(1 0 0) LinearFunction(coefficients=1 0)
        TransformAxis rotation3: coordinates=pelvis_rotation axis=(0 1 0) LinearFunction(coefficients=1 0)
        TransformAxis translation1: coordinates=pelvis_tx axis=(1 0 0) LinearFunction(coefficients=1 0)
        TransformAxis translation2: coordinates=pelvis_ty axis=(0 1 0) LinearFunction(coefficients=1 0)
        TransformAxis translation3: coordinates=pelvis_tz axis=(0 0 1) LinearFunction(coefficients=1 0)
    CustomJoint hip_r: socket_parent_frame=pelvis_offset socket_child_frame=femur_r_offset
      Coordinate hip_flexion_r: default_value=0 range=(-0.5235988 2.02458) clamped=true
      Coordinate hip_adduction_r: default_value=0 range=(-0.8726646 0.5235988) clamped=true
      Coordinate hip_rotation_r: default_value=0 range=(-0.6981317 0.6981317) clamped=true
      PhysicalOffsetFrame pelvis_offset: socket_parent=/bodyset/pelvis/hip_r_parent_stationbodyoffset
          translation=(0 0 0)
      PhysicalOffsetFrame femur_r_offset: socket_parent=/bodyset/femur_r/femur_r_stationbodyoffset translation=(0 0 0)
      SpatialTransform: axes_held_at_zero=(translation1 translation2 translation3)
        TransformAxis rotation1: coordinates=hip_flexion_r axis=(0 0 1) LinearFunction(coefficients=1 0)
        TransformAxis rotation2: coordinates=hip_adduction_r axis=(1 0 0) LinearFunction(coefficients=1 0)
        TransformAxis rotation3: coordinates=hip_rotation_r axis=(0 1 0) LinearFunction(coefficients=1 0)
    WeldJoint patellofemoral_r: socket_parent_frame=femur_r_offset socket_child_frame=patella_r_offset
      PhysicalOffsetFrame femur_r_offset: socket_parent=/bodyset/femur_r/femur_r_stationbodyoffset translation=(0 0 0)
      PhysicalOffsetFrame patella_r_offset: socket_parent=/bodyset/patella_r/patella_r_stationbodyoffset
          translation=(0 0 0)
    CustomJoint hip_l: socket_parent_frame=pelvis_offset socket_child_frame=femur_l_offset
      Coordinate hip_flexion_l: default_value=0 range=(-0.5235988 2.02458) clamped=true
      Coordinate hip_adduction_l: default_value=0 range=(-0.8726646 0.5235988) clamped=true
      Coordinate hip_rotation_l: default_value=0 range=(-0.6981317 0.6981317) clamped=true
      PhysicalOffsetFrame pelvis_offset: socket_parent=/bodyset/pelvis/hip_l_parent_stationbodyoffset
          translation=(0 0 0)
      PhysicalOffsetFrame femur_l_offset: socket_parent=/bodyset/femur_l/femur_l_stationbodyoffset translation=(0 0 0)
      SpatialTransform: axes_held_at_zero=(translation1 translation2 translation3)
        TransformAxis rotation1: coordinates=hip_flexion_l axis=(0 0 1) LinearFunction(coefficients=1 0)
        TransformAxis rotation2: coordinates=hip_adduction_l axis=(1 0 0) LinearFunction(coefficients=-1 0)
        TransformAxis rotation3: coordinates=hip_rotation_l axis=(0 1 0) LinearFunction(coefficients=-1 0)
    WeldJoint patellofemoral_l: socket_parent_frame=femur_l_offset socket_child_frame=patella_l_offset
      PhysicalOffsetFrame femur_l_offset: socket_parent=/bodyset/femur_l/femur_l_stationbodyoffset translation=(0 0 0)
      PhysicalOffsetFrame patella_l_offset: socket_parent=/bodyset/patella_l/patella_l_stationbodyoffset
          translation=(0 0 0)
  # NOTE: All muscle parameters are inherited from the original RajagopalLaiUlrich2023 model and are not adjusted during morphing with MSK-Morph. Future work should scale these parameters to match subject-specific morphology.
  ForceSet:
    Millard2012EquilibriumMuscle [values shared by the 22 below unless stated]: fiber_damping=0.1
        default_activation=0.01 minimum_activation=0.01
      ActiveForceLengthCurve: min_norm_active_fiber_length=0.25 transition_norm_fiber_length=0.77
          max_norm_active_fiber_length=1.9 shallow_ascending_slope=0.75 minimum_value=0
      ForceVelocityCurve: concentric_slope_at_vmax=0 concentric_slope_near_vmax=0.25 isometric_slope=5
          eccentric_slope_at_vmax=0 eccentric_slope_near_vmax=0.15 max_eccentric_velocity_force_multiplier=1.4
      TendonForceLengthCurve
    Millard2012EquilibriumMuscle addmagDist_l: max_isometric_force=597.2951 optimal_fiber_length=0.1772
        tendon_slack_length=0.0873807 pennation_angle_at_optimal=0.194705 [radians]
      PathPoint P1: pelvis_physicalbodyoffset (-0.07431003 0.812487 -0.03982)
      PathPoint P2: femur_l_physicalbodyoffset (-0.04536054 0.5980272 -0.09699075)
      PathWrap: wrap_object=addmagDist_at_femur_l method=hybrid
      FiberForceLengthCurve: strain_at_zero_force=9.713794e-8 strain_at_one_norm_force=0.7000001
          stiffness_at_low_force=0.2 stiffness_at_one_norm_force=2.857143 curviness=0.75
    Millard2012EquilibriumMuscle addmagIsch_l: max_isometric_force=597.2951 optimal_fiber_length=0.1562
        tendon_slack_length=0.216343 pennation_angle_at_optimal=0.1680443
      PathPoint P1: pelvis_physicalbodyoffset (-0.08989441 0.81043 -0.04171)
      PathPoint P2: femur_l_physicalbodyoffset (-0.05167802 0.4725595 -0.04494007)
      PathWrap: wrap_object=addmagIsch_at_femur_l method=hybrid
      FiberForceLengthCurve: strain_at_zero_force=0.005651991 strain_at_one_norm_force=0.7000408
          stiffness_at_low_force=0.2 stiffness_at_one_norm_force=2.880231 curviness=0.75
    Millard2012EquilibriumMuscle addmagMid_l: max_isometric_force=597.2951 optimal_fiber_length=0.1377
        tendon_slack_length=0.0466277 pennation_angle_at_optimal=0.2073076
      PathPoint P1: pelvis_physicalbodyoffset (-0.05291543 0.8193617 -0.02854)
      PathPoint P2: femur_l_physicalbodyoffset (-0.05422273 0.6981255 -0.1068983)
      PathWrap: wrap_object=addmagMid_at_femur_l method=hybrid
      FiberForceLengthCurve: strain_at_zero_force=1.776572e-8 strain_at_one_norm_force=0.7000001
          stiffness_at_low_force=0.2 stiffness_at_one_norm_force=2.857143 curviness=0.75
    Millard2012EquilibriumMuscle addmagProx_l: max_isometric_force=597.2951 optimal_fiber_length=0.1056
        tendon_slack_length=0.0403241 pennation_angle_at_optimal=0.3114833
      PathPoint P1: pelvis_physicalbodyoffset (-0.03120754 0.8325158 -0.01365)
      PathPoint P2: femur_l_physicalbodyoffset (-0.07192822 0.7816633 -0.1096666)
      PathWrap: wrap_object=addmagProx_at_femur_l method=hybrid
      FiberForceLengthCurve: strain_at_zero_force=8.055312e-8 strain_at_one_norm_force=0.7000001
          stiffness_at_low_force=0.2 stiffness_at_one_norm_force=2.857143 curviness=0.75
    Millard2012EquilibriumMuscle glmax1_l: max_isometric_force=983.7836 optimal_fiber_length=0.147
        tendon_slack_length=0.0873 pennation_angle_at_optimal=0.3540118
      PathPoint P1: pelvis_physicalbodyoffset (-0.1230267 0.9747604 -0.0563)
      PathPoint P2: pelvis_physicalbodyoffset (-0.1257509 0.9160661 -0.0779)
      PathPoint P3: femur_l_physicalbodyoffset (-0.1010598 0.82792 -0.1077889)
      PathPoint P4: femur_l_physicalbodyoffset (-0.08439185 0.803921 -0.1246221)
      PathWrap: wrap_object=glmax1_at_pelvis_l method=hybrid
      FiberForceLengthCurve: strain_at_zero_force=2.229005e-7 strain_at_one_norm_force=0.6999999
          stiffness_at_low_force=0.2 stiffness_at_one_norm_force=2.857144 curviness=0.75
    Millard2012EquilibriumMuscle glmax2_l: max_isometric_force=1406.046 optimal_fiber_length=0.157
        tendon_slack_length=0.109 pennation_angle_at_optimal=0.3673821
      PathPoint P1: pelvis_physicalbodyoffset (-0.1316813 0.9489787 -0.0462)
      PathPoint P2: pelvis_physicalbodyoffset (-0.1345286 0.8793846 -0.0813)
      PathPoint P3: femur_l_physicalbodyoffset (-0.1016464 0.8021203 -0.1027861)
      PathPoint P4: femur_l_physicalbodyoffset (-0.07227606 0.7589227 -0.1195445)
      PathWrap: wrap_object=glmax2_at_pelvis_l method=hybrid
      FiberForceLengthCurve: strain_at_zero_force=1.628612e-7 strain_at_one_norm_force=0.7000001
          stiffness_at_low_force=0.2 stiffness_at_one_norm_force=2.857143 curviness=0.75
    Millard2012EquilibriumMuscle glmax3_l: max_isometric_force=947.7541 optimal_fiber_length=0.167
        tendon_slack_length=0.103 pennation_angle_at_optimal=0.3824161
      PathPoint P1: pelvis_physicalbodyoffset (-0.1301108 0.8877752 -0.009)
      PathPoint P2: pelvis_physicalbodyoffset (-0.127567 0.8139697 -0.0435)
      PathPoint P3: femur_l_physicalbodyoffset (-0.08470736 0.7480232 -0.08701803)
      PathPoint P4: femur_l_physicalbodyoffset (-0.06266974 0.7186239 -0.1187621)
      PathWrap: wrap_object=glmax3_at_pelvis_l method=hybrid
      FiberForceLengthCurve: strain_at_zero_force=0.03977768 strain_at_one_norm_force=0.7004988
          stiffness_at_low_force=0.2 stiffness_at_one_norm_force=3.026996 curviness=0.75
    Millard2012EquilibriumMuscle glmed1_l: max_isometric_force=1093.467 optimal_fiber_length=0.0765
        tendon_slack_length=0.0585 pennation_angle_at_optimal=0.3165559
      PathPoint P1: pelvis_physicalbodyoffset (-0.04894487 0.9661036 -0.115)
      PathPoint P2: femur_l_physicalbodyoffset (-0.07072126 0.8425219 -0.1366528)
      FiberForceLengthCurve: strain_at_zero_force=6.185261e-8 strain_at_one_norm_force=0.7000001
          stiffness_at_low_force=0.2 stiffness_at_one_norm_force=2.857143 curviness=0.75
    Millard2012EquilibriumMuscle glmed2_l: max_isometric_force=765.0917 optimal_fiber_length=0.084
        tendon_slack_length=0.07545 pennation_angle_at_optimal=0.3165559
      PathPoint P1: pelvis_physicalbodyoffset (-0.08488341 0.9951798 -0.082)
      PathPoint P2: femur_l_physicalbodyoffset (-0.07871595 0.8505211 -0.1336367)
      FiberForceLengthCurve: strain_at_zero_force=-0.1329608 strain_at_one_norm_force=0.6904088
          stiffness_at_low_force=0.2 stiffness_at_one_norm_force=2.429043 curviness=0.75
    Millard2012EquilibriumMuscle glmed3_l: max_isometric_force=871.1993 optimal_fiber_length=0.0781
        tendon_slack_length=0.0484 pennation_angle_at_optimal=0.3165559
      PathPoint P1: pelvis_physicalbodyoffset (-0.09996591 0.9562116 -0.064)
      PathPoint P2: femur_l_physicalbodyoffset (-0.08760783 0.8558203 -0.1294185)
      FiberForceLengthCurve: strain_at_zero_force=-0.1914236 strain_at_one_norm_force=0.6558113
          stiffness_at_low_force=0.2 stiffness_at_one_norm_force=2.360621 curviness=0.75
    Millard2012EquilibriumMuscle recfem_l: max_isometric_force=2191.741 optimal_fiber_length=0.07589965
        tendon_slack_length=0.4504 pennation_angle_at_optimal=0.2170149
      PathPoint P1: pelvis_physicalbodyoffset (-0.02408206 0.9012509 -0.0933)
      PathPoint P2: patella_l_physicalbodyoffset (-0.002305583 0.4907843 -0.07847364)
      FiberForceLengthCurve: strain_at_zero_force=0.1997943 strain_at_one_norm_force=0.8997465
          stiffness_at_low_force=0.2 stiffness_at_one_norm_force=2.857338 curviness=0.75
    Millard2012EquilibriumMuscle addmagDist_r: max_isometric_force=597.2951 optimal_fiber_length=0.1772
        tendon_slack_length=0.0873807 pennation_angle_at_optimal=0.194705
      PathPoint P1: pelvis_physicalbodyoffset (-0.07431003 0.812487 0.03982)
      PathPoint P2: femur_r_physicalbodyoffset (-0.04536054 0.5980272 0.09699075)
      PathWrap: wrap_object=addmagDist_at_femur_r method=hybrid
      FiberForceLengthCurve: strain_at_zero_force=9.713794e-8 strain_at_one_norm_force=0.7000001
          stiffness_at_low_force=0.2 stiffness_at_one_norm_force=2.857143 curviness=0.75
    Millard2012EquilibriumMuscle addmagIsch_r: max_isometric_force=597.2951 optimal_fiber_length=0.1562
        tendon_slack_length=0.216343 pennation_angle_at_optimal=0.1680443
      PathPoint P1: pelvis_physicalbodyoffset (-0.08989441 0.81043 0.04171)
      PathPoint P2: femur_r_physicalbodyoffset (-0.05167802 0.4725595 0.04494007)
      PathWrap: wrap_object=addmagIsch_at_femur_r method=hybrid
      FiberForceLengthCurve: strain_at_zero_force=0.005651991 strain_at_one_norm_force=0.7000408
          stiffness_at_low_force=0.2 stiffness_at_one_norm_force=2.880231 curviness=0.75
    Millard2012EquilibriumMuscle addmagMid_r: max_isometric_force=597.2951 optimal_fiber_length=0.1377
        tendon_slack_length=0.0466277 pennation_angle_at_optimal=0.2073076
      PathPoint P1: pelvis_physicalbodyoffset (-0.05291543 0.8193617 0.02854)
      PathPoint P2: femur_r_physicalbodyoffset (-0.05422273 0.6981255 0.1068983)
      PathWrap: wrap_object=addmagMid_at_femur_r method=hybrid
      FiberForceLengthCurve: strain_at_zero_force=1.776572e-8 strain_at_one_norm_force=0.7000001
          stiffness_at_low_force=0.2 stiffness_at_one_norm_force=2.857143 curviness=0.75
    Millard2012EquilibriumMuscle addmagProx_r: max_isometric_force=597.2951 optimal_fiber_length=0.1056
        tendon_slack_length=0.0403241 pennation_angle_at_optimal=0.3114833
      PathPoint P1: pelvis_physicalbodyoffset (-0.03120754 0.8325158 0.01365)
      PathPoint P2: femur_r_physicalbodyoffset (-0.07192822 0.7816633 0.1096666)
      PathWrap: wrap_object=addmagProx_at_femur_r method=hybrid
      FiberForceLengthCurve: strain_at_zero_force=8.055312e-8 strain_at_one_norm_force=0.7000001
          stiffness_at_low_force=0.2 stiffness_at_one_norm_force=2.857143 curviness=0.75
    Millard2012EquilibriumMuscle glmax1_r: max_isometric_force=983.7836 optimal_fiber_length=0.147
        tendon_slack_length=0.0873 pennation_angle_at_optimal=0.3540118
      PathPoint P1: pelvis_physicalbodyoffset (-0.1230267 0.9747604 0.0563)
      PathPoint P2: pelvis_physicalbodyoffset (-0.1257509 0.9160661 0.0779)
      PathPoint P3: femur_r_physicalbodyoffset (-0.1010598 0.82792 0.1077889)
      PathPoint P4: femur_r_physicalbodyoffset (-0.08439185 0.803921 0.1246221)
      PathWrap: wrap_object=glmax1_at_pelvis_r method=hybrid
      FiberForceLengthCurve: strain_at_zero_force=2.229005e-7 strain_at_one_norm_force=0.6999999
          stiffness_at_low_force=0.2 stiffness_at_one_norm_force=2.857144 curviness=0.75
    Millard2012EquilibriumMuscle glmax2_r: max_isometric_force=1406.046 optimal_fiber_length=0.157
        tendon_slack_length=0.109 pennation_angle_at_optimal=0.3673821
      PathPoint P1: pelvis_physicalbodyoffset (-0.1316813 0.9489787 0.0462)
      PathPoint P2: pelvis_physicalbodyoffset (-0.1345286 0.8793846 0.0813)
      PathPoint P3: femur_r_physicalbodyoffset (-0.1016464 0.8021203 0.1027861)
      PathPoint P4: femur_r_physicalbodyoffset (-0.07227606 0.7589227 0.1195445)
      PathWrap: wrap_object=glmax2_at_pelvis_r method=hybrid
      FiberForceLengthCurve: strain_at_zero_force=1.628612e-7 strain_at_one_norm_force=0.7000001
          stiffness_at_low_force=0.2 stiffness_at_one_norm_force=2.857143 curviness=0.75
    Millard2012EquilibriumMuscle glmax3_r: max_isometric_force=947.7541 optimal_fiber_length=0.167
        tendon_slack_length=0.103 pennation_angle_at_optimal=0.3824161
      PathPoint P1: pelvis_physicalbodyoffset (-0.1301108 0.8877752 0.009)
      PathPoint P2: pelvis_physicalbodyoffset (-0.127567 0.8139697 0.0435)
      PathPoint P3: femur_r_physicalbodyoffset (-0.08470736 0.7480232 0.08701803)
      PathPoint P4: femur_r_physicalbodyoffset (-0.06266974 0.7186239 0.1187621)
      PathWrap: wrap_object=glmax3_at_pelvis_r method=hybrid
      FiberForceLengthCurve: strain_at_zero_force=0.03977768 strain_at_one_norm_force=0.7004988
          stiffness_at_low_force=0.2 stiffness_at_one_norm_force=3.026996 curviness=0.75
    Millard2012EquilibriumMuscle glmed1_r: max_isometric_force=1093.467 optimal_fiber_length=0.0765
        tendon_slack_length=0.0585 pennation_angle_at_optimal=0.3165559
      PathPoint P1: pelvis_physicalbodyoffset (-0.04894487 0.9661036 0.115)
      PathPoint P2: femur_r_physicalbodyoffset (-0.07072126 0.8425219 0.1366528)
      FiberForceLengthCurve: strain_at_zero_force=6.185261e-8 strain_at_one_norm_force=0.7000001
          stiffness_at_low_force=0.2 stiffness_at_one_norm_force=2.857143 curviness=0.75
    Millard2012EquilibriumMuscle glmed2_r: max_isometric_force=765.0917 optimal_fiber_length=0.084
        tendon_slack_length=0.07545 pennation_angle_at_optimal=0.3165559
      PathPoint P1: pelvis_physicalbodyoffset (-0.08488341 0.9951798 0.082)
      PathPoint P2: femur_r_physicalbodyoffset (-0.07871595 0.8505211 0.1336367)
      FiberForceLengthCurve: strain_at_zero_force=-0.1329608 strain_at_one_norm_force=0.6904088
          stiffness_at_low_force=0.2 stiffness_at_one_norm_force=2.429043 curviness=0.75
    Millard2012EquilibriumMuscle glmed3_r: max_isometric_force=871.1993 optimal_fiber_length=0.0781
        tendon_slack_length=0.0484 pennation_angle_at_optimal=0.3165559
      PathPoint P1: pelvis_physicalbodyoffset (-0.09996591 0.9562116 0.064)
      PathPoint P2: femur_r_physicalbodyoffset (-0.08760783 0.8558203 0.1294185)
      FiberForceLengthCurve: strain_at_zero_force=-0.1914236 strain_at_one_norm_force=0.6558113
          stiffness_at_low_force=0.2 stiffness_at_one_norm_force=2.360621 curviness=0.75
    Millard2012EquilibriumMuscle recfem_r: max_isometric_force=2191.741 optimal_fiber_length=0.07589949
        tendon_slack_length=0.4504 pennation_angle_at_optimal=0.2170149
      PathPoint P1: pelvis_physicalbodyoffset (-0.02408206 0.9012509 0.0933)
      PathPoint P2: patella_r_physicalbodyoffset (-0.002305583 0.4907843 0.07847364)
      FiberForceLengthCurve: strain_at_zero_force=0.1997943 strain_at_one_norm_force=0.8997465
          stiffness_at_low_force=0.2 stiffness_at_one_norm_force=2.857338 curviness=0.75
