# OpenSim document version 40000
MarkerSet:
  Marker rASIS: pelvis_physicalbodyoffset (0.0, 0.940000, 0.120833) fixed=true
  Marker lASIS: pelvis_physicalbodyoffset (0.0, 0.940000, -0.120833) fixed=true
  Marker midASIS: pelvis_physicalbodyoffset (0.0, 0.940000, 0.0) fixed=true
  Marker rPSIS: pelvis_physicalbodyoffset (-0.137926, 0.956807, 0.040577) fixed=true
  Marker lPSIS: pelvis_physicalbodyoffset (-0.137926, 0.956807, -0.040577) fixed=true
  Marker midPSIS: pelvis_physicalbodyoffset (-0.137926, 0.956807, 0.000000) fixed=true
  Marker mid_midASISmidPSIS: pelvis_physicalbodyoffset (-0.068963 0.9484035 0) fixed=true
  Marker rHJC: pelvis_physicalbodyoffset (-0.056240, 0.861526, 0.077217) fixed=true
  Marker rFLE: femur_r_physicalbodyoffset (-0.058419, 0.455208, 0.114293) fixed=true
  Marker rFME: femur_r_physicalbodyoffset (-0.049446, 0.458969, 0.038962) fixed=true
  Marker midrFE: femur_r_physicalbodyoffset (-0.053933, 0.457088, 0.076628) fixed=true
  Marker lHJC: pelvis_physicalbodyoffset (-0.056240, 0.861526, -0.077217) fixed=true
  Marker lFLE: femur_l_physicalbodyoffset (-0.058419, 0.455208, -0.114293) fixed=true
  Marker lFME: femur_l_physicalbodyoffset (-0.049446, 0.458969, -0.038962) fixed=true
  Marker midlFE: femur_l_physicalbodyoffset (-0.053933, 0.457088, -0.076628) fixed=true
  Marker midHJC: pelvis_physicalbodyoffset (-0.05624 0.861526 0) fixed=true
